u := sin^2*(x - 2*y)  # error: Эта переменная неопределена.
d/dx(sin(x - 2*y)^2) → 2*cos(x - 2*y)*sin(x - 2*y)
d/dx(cos(x - 2*y)*sin(x - 2*y)) → cos(x - 2*y)^2 - sin(x - 2*y)^2
d/dx(cos(x - 2*y)^2 - sin(x - 2*y)^2) → -4*cos(x - 2*y)*sin(x - 2*y)
d/dy(sin(x - 2*y)^2) → -4*cos(x - 2*y)*sin(x - 2*y)
d/dy(-4*cos(x - 2*y)*sin(x - 2*y)) → 8*cos(x - 2*y)^2 - 8*sin(x - 2*y)^2
d/dy(8*cos(x - 2*y)^2 - 8*sin(x - 2*y)^2) → 64*cos(x - 2*y)*sin(x - 2*y)
d/dy(-4*cos(x - 2*y)*sin(x - 2*y)) → 8*cos(x - 2*y)^2 - 8*sin(x - 2*y)^2
d/dy(cos(x - 2*y)^2 - sin(x - 2*y)^2) → 8*cos(x - 2*y)*sin(x - 2*y)
d/dy(8*cos(x - 2*y)*sin(x - 2*y)) → 16*sin(x - 2*y)^2 - 16*cos(x - 2*y)^2
