integral((1 - 2*sin(x))/(cos(x)*cos(x)), x) → (sin(2*x) - 4*cos(x))/(cos(2*x) + 1)
integral(ln(x)*x^5, x) → x^6*(6*ln(x) - 1)/36
integral(x^5*ln(x), x) → x^6*(6*ln(x) - 1)/36
integral(1/(x*(1 + x^2)), x) → ln(x) - ln(x^2 + 1)/2
integral((7*x + 2)/sqrt(x^2 + 10), x) → 2*ln(x + sqrt(x^2 + 10)) + 7*sqrt(x^2 + 10)
integral((2 - sin(x))/(2 + cos(x)), x) → ln(cos(x) - sqrt(3) + 2 + sin(x)*1i) + ln(cos(x) + sqrt(3) + 2 + sin(x)*1i) + 2i*sqrt(3)*ln(cos(x) + sqrt(3) + 2 + sin(x)*1i)/3 - 2i*sqrt(3)*ln(cos(x) - sqrt(3) + 2 + sin(x)*1i)/3 - x*1i
d/dx((x - 1)/(x + 1)) → 1/(x + 1) - (x - 1)/(x + 1)^2
x := -50 .. 50
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A := [0, 1, 3; 5, -2, 0; 2, 0, -3]
|A| → 27
