a := [0, 1, 3; 5, -2, 0; 2, 0, -3]
b := [8; 9; 10]
x := lsolve(a, b)
x = [5; 8; 0]
# Все что выше это правильный ответ для контроля
#
# ниже решаем методом Крамера
da := |a| = 27
da := 0*(-2)*(-3) + 5*0*3 + 1*0*2 - 3*2*(-2) - 5*1*(-3) - 0 = 27
da1 := [8, 1, 3; 9, -2, 0; 10, 0, -3]
da2 := [0, 8, 3; 5, 9, 0; 2, 10, -3]
da3 := [0, 1, 8; 5, -2, 9; 2, 0, 10]
# расписал как находить для тетрадки
dda1t := 8*(-2)*(-3) + 9*0*3 + 1*0*10 - 10*(-2)*3 - 9*1*(-3) - 8*0*0 = 135
dda2t := 0*9*(-3) + 5*10*3 + 8*0*2 - 2*9*3 - 5*8*(-3) - 0*10*0 = 216
dda3t := 0*(-2)*10 + 5*0*8 + 1*9*2 - 8*(-2)*2 - 9*0*0 - 5*1*10 = 0
dda1 := |da1| = 135
dda2 := |da2| = 216
dda3 := |da3| = 0
x1 := dda1/da = 5
x2 := dda2/da = 8
x3 := dda3/da = 0
X := [x1; x2; x3] = [5; 8; 0]
# Ниже матричный метод по методичке | контроль решения обратная матрица
a := [0, 1, 3; 5, -2, 0; 2, 0, -3]
b := [8; 9; 10]
aob := a^-1 = [0.222222, 0.111111, 0.222222; 0.555556, -0.222222, 0.555556; 0.148148, 0.0740741, -0.185185]
da := |a| = 27  # слева контроль, ниже сами считаем по формуле
da := 0*(-2)*(-3) + 5*0*3 + 1*0*2 - 3*2*(-2) - 5*1*(-3) - 0 = 27
a11 := (-1)^(1 + 1)*det([-2, 0; 0, -3]) = 6
a12 := (-1)^(1 + 2)*det([5, 0; 2, -3]) = 15
a13 := (-1)^(1 + 3)*det([5, -2; 2, 0]) = 4
a21 := (-1)^(2 + 1)*det([1, 3; 0, -3]) = 3
a22 := (-1)^(2 + 2)*det([0, 3; 2, -3]) = -6
a23 := (-1)^(2 + 3)*det([0, 1; 2, 0]) = 2
a31 := (-1)^(3 + 1)*det([1, 3; -2, 0]) = 6
a32 := (-1)^(3 + 2)*det([0, 3; 5, 0]) = 15
a33 := (-1)^(3 + 3)*det([0, 1; 5, -2]) = -5
# матрица алгебраических дополнений | транспонируем её
an := [a11, a12, a13; a21, a22, a23; a31, a32, a33] = [6, 15, 4; 3, -6, 2; 6, 15, -5]
ant := transpose(an) = [6, 3, 6; 15, -6, 15; 4, 2, -5]
da = 27  # помним что слева наш определитель основной матрицы
# делим транспонированную матрицу алг. дополнений на определитель
am1 := 1/da*ant = [0.222222, 0.111111, 0.222222; 0.555556, -0.222222, 0.555556; 0.148148, 0.0740741, -0.185185]
# и домножим её справа на столбец свободных членов получим ответ
X := am1*b = [5; 8; 0]
